2018-02-05
오후 05:02
$PROB GABRIELSSON PK21
$INPUT TIME AMT ADDL II DV MDV
$DATA ../PK21NM.csv IGNORE=@
$SUBR ADVAN13 TOL6
$MODEL
  COMP (DEPOT, DEFDOSE)
  COMP (CENTRAL, DEFOBS)
$PK
  Ka    = THETA(1)
  CLss  = THETA(2)
  CLpre = THETA(3)
  RKD   = THETA(4)
  V     = THETA(5)
  ALAG1 = THETA(6)
  S2    = V/3796.94

$DES
  TBP  = 216
  TBP2 = 512

  RKPRE = CLpre/V
  RKSS  = CLss/V

  K1 = RKPRE
  K2 = RKSS - (RKSS - RKPRE)*exp(-RKD*(T - TBP))
  AS = RKSS - (RKSS - RKPRE)*exp(-RKD*(TBP2 - TBP))
  K3 = RKPRE - (RKPRE - AS)*exp(-RKD*(T - TBP2))

  Ke = K1
  IF (T .GE. TBP .AND. T .LT. TBP2) Ke = K2
  IF (T .GE. TBP2) Ke = K3

  DADT(1) = -Ka*A(1)
  DADT(2) = Ka*A(1) - Ke*A(2)

$ERROR
  Y    = F + ERR(1)
$THETA
  (0.1, 3, 5)
  (20, 140, 500)
  (4, 40, 200)
  (0, 0.005, 1)
  (100, 1260, 3000)
  (0, 0.7, 3)

$OMEGA 1
$EST MAX=9999
$COV UNCOND PRINT=ERS

NM-TRAN MESSAGES
 WARNINGS AND ERRORS (IF ANY) FOR PROBLEM    1
 (WARNING  1) NM-TRAN INFERS THAT THE DATA ARE SINGLE-SUBJECT.
  NONMEM RUN CANNOT BE PARALLELIZED.

1NONLINEAR MIXED EFFECTS MODEL PROGRAM (NONMEM) VERSION 7.4.1
 ORIGINALLY DEVELOPED BY STUART BEAL, LEWIS SHEINER, AND ALISON BOECKMANN
 CURRENT DEVELOPERS ARE ROBERT BAUER, ICON DEVELOPMENT SOLUTIONS,
 AND ALISON BOECKMANN. IMPLEMENTATION, EFFICIENCY, AND STANDARDIZATION
 PERFORMED BY NOUS INFOSYSTEMS.
 PROBLEM NO.:         1
 GABRIELSSON PK21
 TOT. NO. OF OBS RECS:       23
 TOT. NO. OF INDIVIDUALS:       23
 GENERAL NONLINEAR KINETICS MODEL WITH STIFF/NONSTIFF EQUATIONS (LSODA, ADVAN13)
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 #TBLN:      1
 #METH: First Order
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
 #TERM:
0MINIMIZATION SUCCESSFUL
 NO. OF FUNCTION EVALUATIONS USED:      240
 NO. OF SIG. DIGITS IN FINAL EST.:  3.7

 TOTAL DATA POINTS NORMALLY DISTRIBUTED (N):           23
 N*LOG(2PI) CONSTANT TO OBJECTIVE FUNCTION:    42.271172527414940
 OBJECTIVE FUNCTION VALUE WITHOUT CONSTANT:    46.453268920426510
 OBJECTIVE FUNCTION VALUE WITH CONSTANT:       88.724441447841457
 REPORTED OBJECTIVE FUNCTION DOES NOT CONTAIN CONSTANT

 TOTAL EFFECTIVE ETAS (NIND*NETA):                            23


 #TERE:
 Elapsed estimation  time in seconds:     1.48
 Elapsed covariance  time in seconds:     0.58
 Elapsed postprocess time in seconds:     0.00

 ********************                                   FIRST ORDER                                  ********************
 #OBJT:**************                       MINIMUM VALUE OF OBJECTIVE FUNCTION                      ********************
 #OBJV:********************************************       46.453       **************************************************

 ********************                                   FIRST ORDER                                  ********************
 ********************                             FINAL PARAMETER ESTIMATE                           ********************

 THETA - VECTOR OF FIXED EFFECTS PARAMETERS   *********
         TH 1      TH 2      TH 3      TH 4      TH 5      TH 6
         1.84E+00  1.14E+02  4.63E+01  5.47E-03  1.68E+03  8.15E-01

 OMEGA - COV MATRIX FOR RANDOM EFFECTS - ETAS  ********
         ETA1
 ETA1
+        2.77E+00

 OMEGA - CORR MATRIX FOR RANDOM EFFECTS - ETAS  *******
         ETA1
 ETA1
+        1.66E+00

 ********************                                   FIRST ORDER                                  ********************
 ********************                            STANDARD ERROR OF ESTIMATE                          ********************

 THETA - VECTOR OF FIXED EFFECTS PARAMETERS   *********
         TH 1      TH 2      TH 3      TH 4      TH 5      TH 6
         6.38E-01  1.38E+00  4.39E-01  2.51E-04  1.08E+02  8.15E-02

 OMEGA - COV MATRIX FOR RANDOM EFFECTS - ETAS  ********
         ETA1
 ETA1
+        7.21E-01

 OMEGA - CORR MATRIX FOR RANDOM EFFECTS - ETAS  *******
         ETA1
 ETA1
+        2.17E-01

 ********************                                   FIRST ORDER                                  ********************
 ********************                          COVARIANCE MATRIX OF ESTIMATE                         ********************

            TH 1      TH 2      TH 3      TH 4      TH 5      TH 6      OM11
 TH 1
+        4.07E-01
 TH 2
+       -3.00E-01  1.89E+00
 TH 3
+       -4.57E-02 -2.68E-01  1.92E-01
 TH 4
+        1.28E-04 -1.76E-04 -1.17E-05  6.32E-08
 TH 5
+        4.38E+01 -3.00E+01 -1.77E+01  2.01E-02  1.17E+04
 TH 6
+        5.00E-02 -5.23E-02 -4.60E-03  1.68E-05  5.67E+00  6.64E-03
 OM11
+        1.31E-03  2.25E-01 -1.55E-01  5.32E-06  2.53E+01 -3.54E-04  5.20E-01

 ********************                                   FIRST ORDER                                  ********************
 ********************                          CORRELATION MATRIX OF ESTIMATE                        ********************

            TH 1      TH 2      TH 3      TH 4      TH 5      TH 6      OM11
 TH 1
+        6.38E-01
 TH 2
+       -3.42E-01  1.38E+00
 TH 3
+       -1.63E-01 -4.44E-01  4.39E-01
 TH 4
+        8.00E-01 -5.10E-01 -1.06E-01  2.51E-04
 TH 5
+        6.34E-01 -2.01E-01 -3.73E-01  7.37E-01  1.08E+02
 TH 6
+        9.62E-01 -4.67E-01 -1.29E-01  8.19E-01  6.42E-01  8.15E-02
 OM11
+        2.86E-03  2.27E-01 -4.91E-01  2.94E-02  3.24E-01 -6.03E-03  7.21E-01
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
 ********************                                   FIRST ORDER                                  ********************
 ********************                      EIGENVALUES OF COR MATRIX OF ESTIMATE                     ********************

             1         2         3         4         5         6         7
         2.65E-02  1.50E-01  3.14E-01  3.60E-01  6.92E-01  1.89E+00  3.57E+00
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 Elapsed finaloutput time in seconds:     0.02
 #CPUT: Total CPU Time in Seconds,        2.122
