2017-10-06
11:47
$PROB GABRIELSSON PK22
$INPUT TIME AMT RATE ADDL II DV MDV
$DATA ../PK22NM.csv IGNORE=@
$SUBR ADVAN13 TOL6
$MODEL
  COMP (CENTRAL, DEFDOSE, DEFOBS)
  COMP (PERIPH)
  COMP (ENZYME)
$PK
  V    = THETA(1)
  CLs  = THETA(2)
  CLd  = THETA(3)
  V2   = THETA(4)
  Kout = THETA(5)
  E0   = THETA(6)
  S1   = V

  IF (A_0FLG .EQ. 1) THEN
    A_0(3) = E0
  ENDIF

$DES
  C1 = A(1)/V
  C2 = A(2)/V2
  CL = CLs*(1 + A(3))
  DADT(1) = -CL*C1 - CLd*C1 + CLd*C2
  DADT(2) = CLd*C1 - CLd*C2
  DADT(3) = Kout*(E0 + C1) - Kout*A(3)

$ERROR
  Y    = F + F*ERR(1)

$THETA
  (0, 155)
  (0, 0.05)
  (0, 120)
  (0, 60)
  (0, 0.03)
  (0, 100)

$OMEGA 0.1
$EST MAX=9999
$COV UNCOND PRINT=ERS

NM-TRAN MESSAGES
 WARNINGS AND ERRORS (IF ANY) FOR PROBLEM    1
 (WARNING  1) NM-TRAN INFERS THAT THE DATA ARE SINGLE-SUBJECT.
  NONMEM RUN CANNOT BE PARALLELIZED.

1NONLINEAR MIXED EFFECTS MODEL PROGRAM (NONMEM) VERSION 7.4.1
 ORIGINALLY DEVELOPED BY STUART BEAL, LEWIS SHEINER, AND ALISON BOECKMANN
 CURRENT DEVELOPERS ARE ROBERT BAUER, ICON DEVELOPMENT SOLUTIONS,
 AND ALISON BOECKMANN. IMPLEMENTATION, EFFICIENCY, AND STANDARDIZATION
 PERFORMED BY NOUS INFOSYSTEMS.
 PROBLEM NO.:         1
 GABRIELSSON PK22
 TOT. NO. OF OBS RECS:       37
 TOT. NO. OF INDIVIDUALS:       37
 GENERAL NONLINEAR KINETICS MODEL WITH STIFF/NONSTIFF EQUATIONS (LSODA, ADVAN13)
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 #TBLN:      1
 #METH: First Order
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
 #TERM:
0MINIMIZATION SUCCESSFUL
 NO. OF FUNCTION EVALUATIONS USED:      257
 NO. OF SIG. DIGITS IN FINAL EST.:  3.3

 TOTAL DATA POINTS NORMALLY DISTRIBUTED (N):           37
 N*LOG(2PI) CONSTANT TO OBJECTIVE FUNCTION:    68.001451457145777
 OBJECTIVE FUNCTION VALUE WITHOUT CONSTANT:    231.89145111340204
 OBJECTIVE FUNCTION VALUE WITH CONSTANT:       299.89290257054779
 REPORTED OBJECTIVE FUNCTION DOES NOT CONTAIN CONSTANT

 TOTAL EFFECTIVE ETAS (NIND*NETA):                            37


 #TERE:
 Elapsed estimation  time in seconds:     0.15
 Elapsed covariance  time in seconds:     0.05
 Elapsed postprocess time in seconds:     0.00

 ********************                                   FIRST ORDER                                  ********************
 #OBJT:**************                       MINIMUM VALUE OF OBJECTIVE FUNCTION                      ********************
 #OBJV:********************************************      231.891       **************************************************

 ********************                                   FIRST ORDER                                  ********************
 ********************                             FINAL PARAMETER ESTIMATE                           ********************

 THETA - VECTOR OF FIXED EFFECTS PARAMETERS   *********
         TH 1      TH 2      TH 3      TH 4      TH 5      TH 6
         1.50E+02  4.10E-02  9.79E+01  5.41E+01  2.39E-02  1.33E+02

 OMEGA - COV MATRIX FOR RANDOM EFFECTS - ETAS  ********
         ETA1
 ETA1
+        1.70E-03

 OMEGA - CORR MATRIX FOR RANDOM EFFECTS - ETAS  *******
         ETA1
 ETA1
+        4.12E-02

 ********************                                   FIRST ORDER                                  ********************
 ********************                            STANDARD ERROR OF ESTIMATE                          ********************

 THETA - VECTOR OF FIXED EFFECTS PARAMETERS   *********
         TH 1      TH 2      TH 3      TH 4      TH 5      TH 6
         5.06E+01  2.99E-03  1.72E+02  5.56E+01  4.82E-03  2.94E+01

 OMEGA - COV MATRIX FOR RANDOM EFFECTS - ETAS  ********
         ETA1
 ETA1
+        3.85E-04

 OMEGA - CORR MATRIX FOR RANDOM EFFECTS - ETAS  *******
         ETA1
 ETA1
+        4.67E-03

 ********************                                   FIRST ORDER                                  ********************
 ********************                          COVARIANCE MATRIX OF ESTIMATE                         ********************

            TH 1      TH 2      TH 3      TH 4      TH 5      TH 6      OM11
 TH 1
+        2.56E+03
 TH 2
+       -8.47E-02  8.93E-06
 TH 3
+       -8.68E+03  3.00E-01  2.94E+04
 TH 4
+       -2.81E+03  9.79E-02  9.55E+03  3.10E+03
 TH 5
+       -2.41E-01  8.73E-06  8.20E-01  2.66E-01  2.32E-05
 TH 6
+        9.40E+02 -8.60E-02 -3.31E+03 -1.08E+03 -9.75E-02  8.63E+02
 OM11
+       -1.04E-03  9.86E-09  3.46E-03  9.10E-04  1.74E-07 -7.65E-05  1.48E-07

 ********************                                   FIRST ORDER                                  ********************
 ********************                          CORRELATION MATRIX OF ESTIMATE                        ********************

            TH 1      TH 2      TH 3      TH 4      TH 5      TH 6      OM11
 TH 1
+        5.06E+01
 TH 2
+       -5.60E-01  2.99E-03
 TH 3
+       -9.99E-01  5.85E-01  1.72E+02
 TH 4
+       -9.99E-01  5.89E-01  1.00E+00  5.56E+01
 TH 5
+       -9.87E-01  6.06E-01  9.91E-01  9.90E-01  4.82E-03
 TH 6
+        6.32E-01 -9.79E-01 -6.56E-01 -6.59E-01 -6.88E-01  2.94E+01
 OM11
+       -5.33E-02  8.57E-03  5.24E-02  4.25E-02  9.40E-02 -6.77E-03  3.85E-04
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
 ********************                                   FIRST ORDER                                  ********************
 ********************                      EIGENVALUES OF COR MATRIX OF ESTIMATE                     ********************

             1         2         3         4         5         6         7
         1.02E-04  6.32E-04  5.09E-03  2.31E-02  9.28E-01  1.03E+00  5.01E+00
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 Elapsed finaloutput time in seconds:     0.01
 #CPUT: Total CPU Time in Seconds,        0.234
